*Heading
** Job name: V8Template Model name: MagMemModel_Tied
** Generated by: Abaqus/CAE 2022
*Preprint, echo=NO, model=NO, history=NO, contact=NO
**
** PARTS
**
*Part, name=PART-1
*Node
      1,         -10.,         -10.,           0.
      2,          -9.,         -10.,           0.
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*Element, type=S4R
  1,   1,   2,  23,  22
  2,   2,   3,  24,  23
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*Nset, nset=SET-1, generate
   1,  441,    1
*Elset, elset=SET-1, generate
   1,  400,    1
*Nset, nset=SET-2, generate
  1,  21,   1
*Elset, elset=SET-2, generate
  1,  20,   1
*Elset, elset=_SURF-1_SPOS, internal, generate
   1,  400,    1
*Surface, type=ELEMENT, name=SURF-1
_SURF-1_SPOS, SPOS
*Elset, elset=__PickedSurf9_SPOS, internal, generate
   1,  400,    1
*Surface, type=ELEMENT, name=_PickedSurf9, internal
__PickedSurf9_SPOS, SPOS
*Orientation, name=Ori-PART-1_ORI-1-DISCORIENT, system=RECTANGULAR
PART-1_ORI-1-DISCORIENT
3, 0.
** Section: Section-1-SET-1
*Shell Section, elset=SET-1, material=PDMS_NI_5_PERCENT_THETA0_PHI90, orientation=Ori-PART-1_ORI-1-DISCORIENT
1., 5
*Distribution, name=PART-1_ORI-1-DISCORIENT, location=ELEMENT, Table=PART-1_ORI-1-DISCORIENT_Table
,           1.,           0.,           0.,           0.,           1.,           0.
1,           1.,           0.,           0.,           0.,           1.,           0.
2,           1.,           0.,           0.,           0.,           1.,           0.
3,           1.,           0.,           0.,           0.,           1.,           0.
4,           1.,           0.,           0.,           0.,           1.,           0.
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400,           1.,           0.,           0.,           0.,           1.,           0.
*End Part
**
*Part, name=SKIN&MUSCLE
*Node
      1,         -10.,           0.,          35.
      2,          10.,           0.,          35.
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*Element, type=C3D8H
   1,  172,  477,   17,    1, 4175, 4176, 4020, 4016
   2,  477,  478,   18,   17, 4176, 4177, 4021, 4020
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*Nset, nset=SKIN_SET
    1,    2,    3,    4,    5,    6
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*Elset, elset=SKIN_SET, generate
    1,  3748,     1
*Nset, nset=MUSCLE_SET
     9,    10,    11,    12,    13,    14
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*Elset, elset=MUSCLE_SET, generate
  3749,  22488,      1
*Orientation, name=Ori-1
1., 0., 0., 0., 1., 0.
2, 0.
** Section: SKIN_SECTION
*Solid Section, elset=SKIN_SET, orientation=Ori-1, material=SKIN
,
** Section: MUSCLE_SECTION
*Solid Section, elset=MUSCLE_SET, material=MUSCLE
,
*End Part
**
**
** ASSEMBLY
**
*Assembly, name=Assembly
**
*Instance, name=PART-1-1, part=PART-1
         25.,          0.5,          25.
         25.,          0.5,          25.,          24.,          0.5,          25.,          90.
*End Instance
**
*Instance, name=SKIN&MUSCLE-1, part=SKIN&MUSCLE
         25., -2.45548340466059e-16,           0.
*End Instance
**
*Nset, nset=BODY_FACE, instance=PART-1-1, generate
   1,  441,    1
*Elset, elset=BODY_FACE, instance=PART-1-1, generate
   1,  400,    1
*Nset, nset=LEFT_EDGE, instance=PART-1-1, generate
   1,  421,   21
*Elset, elset=LEFT_EDGE, instance=PART-1-1, generate
   1,  381,   20
*Elset, elset=Set-4, instance=SKIN&MUSCLE-1, generate
    1,  3748,     1
*Nset, nset=TopSkinNodes, instance=SKIN&MUSCLE-1
    1,    2,    3,    4,    5,    6
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*Nset, nset=_PickedSet12, internal, instance=SKIN&MUSCLE-1
     5,     6,     7,     8,     9,    10
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*Elset, elset=_PickedSet12, internal, instance=SKIN&MUSCLE-1
  1601,  1621,  1641,  1642,  1643,  1682
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*Nset, nset=_PickedSet13, internal, instance=SKIN&MUSCLE-1
     5,     6,     7,     8,     9,    10
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*Elset, elset=_PickedSet13, internal, instance=SKIN&MUSCLE-1
  1611,  1612,  1613,  1632,  1633,  1634
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*Nset, nset=_PickedSet14, internal, instance=SKIN&MUSCLE-1
    13,    14,    15,    16,   381,   382
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*Elset, elset=_PickedSet14, internal, instance=SKIN&MUSCLE-1, generate
 18741,  22488,      1
*Elset, elset=__PickedSurf10_SNEG, internal, instance=PART-1-1, generate
   1,  400,    1
*Surface, type=ELEMENT, name=_PickedSurf10, internal
__PickedSurf10_SNEG, SNEG
*Elset, elset=__PickedSurf16_S1, internal, instance=SKIN&MUSCLE-1, generate
    1,  1600,     1
*Surface, type=ELEMENT, name=_PickedSurf16, internal
__PickedSurf16_S1, S1
** Constraint: Perfect_Adhesive
*Tie, name=Perfect_Adhesive, adjust=yes, type=SURFACE TO SURFACE
_PickedSurf16, _PickedSurf10
*End Assembly
**
** MATERIALS
**
*Material, name=MUSCLE
*Hyperelastic, neo hooke
 0.00175,0.
*Material, name=PDMS_NI_5_PERCENT_THETA0_PHI90
*Elastic, type=LAMINA
10000., 5000., 0.481, 5000., 2000., 2000.
*Expansion, type=ORTHO
 0.05, 0.05,   0.
*Material, name=SKIN
*Anisotropic Hyperelastic, holzapfel, local direction=1
 0.000341,     0., 0.0178,  11.13,   0.29
*Distribution Table, name=PART-1_ORI-1-DISCORIENT_Table
coord3d, coord3d
**
** BOUNDARY CONDITIONS
**
** Name: BC-1 Type: Symmetry/Antisymmetry/Encastre
*Boundary
_PickedSet12, ZSYMM
** Name: BC-2 Type: Symmetry/Antisymmetry/Encastre
*Boundary
_PickedSet13, XSYMM
** Name: BC-3 Type: Symmetry/Antisymmetry/Encastre
*Boundary
_PickedSet14, ENCASTRE
**
** PREDEFINED FIELDS
**
** Name: Field-1   Type: Temperature
*Initial Conditions, type=TEMPERATURE
BODY_FACE, 0.
** ----------------------------------------------------------------
**
** STEP: Step-1
**
*Step, name=Step-1, nlgeom=YES, inc=10000
*Static, direct
0.1, 1.,
**
** PREDEFINED FIELDS
**
** Name: Field-1   Type: Temperature
*Temperature, op=NEW
** Name: Field-2   Type: Temperature
*Temperature, op=NEW
BODY_FACE, 1.
**
** OUTPUT REQUESTS
**
*Restart, write, frequency=0
**
** FIELD OUTPUT: F-Output-1
**
*Output, field
*Node Output
CF, RF, U
*Element Output, directions=YES
LE, NE, PE, PEEQ, PEMAG, S
*Contact Output
CDISP, CSTRESS
**
** HISTORY OUTPUT: H-Output-1
**
*Output, history, variable=PRESELECT
*End Step
